# OpenSim document version 40500
ScaleTool LaiUhlrich2022_NHE_scaled:
  mass: 80 [kg]
  height: 1.78
  age: -1
  GenericModelMaker:
    model_file: /dataNAS/people/anoopai/OpenCap/opencap-core/Examples/Data/9a8302fa-da69-4037-8ff7-a272adde5208/OpenSimData/Model/LaiUhlrich2022_NHE_generic.osim
  ModelScaler:
    apply: true
    scaling_order: measurements
    marker_file: /dataNAS/people/anoopai/OpenCap/opencap-core/Examples/Data/9a8302fa-da69-4037-8ff7-a272adde5208/MarkerData/PostAugmentation/ed5669af-8cda-4632-abcb-17bf130fabdf.trc
    time_range: 0.6666667 0.7666667
    preserve_mass_distribution: true
    MeasurementSet:
      Measurement foot: apply=true
        MarkerPair: markers=(r_calc_study r_toe_study)
        MarkerPair: markers=(r_calc_study r_5meta_study)
        MarkerPair: markers=(L_calc_study L_toe_study)
        MarkerPair: markers=(L_calc_study L_5meta_study)
        BodyScale talus_r: axes=(X Y Z)
        BodyScale calcn_r: axes=(X Y Z)
        BodyScale toes_r: axes=(X Y Z)
        BodyScale talus_l: axes=(X Y Z)
        BodyScale calcn_l: axes=(X Y Z)
        BodyScale toes_l: axes=(X Y Z)
      Measurement tibia_r: apply=true
        MarkerPair: markers=(r_knee_study r_ankle_study)
        MarkerPair: markers=(r_mknee_study r_mankle_study)
        BodyScale tibia_r: axes=(X Y Z)
      Measurement femur_r: apply=true
        MarkerPair: markers=(RHJC_study r_knee_study)
        BodyScale femur_r: axes=(X Y Z)
        BodyScale patella_r: axes=(X Y Z)
      Measurement tibia_l: apply=true
        MarkerPair: markers=(L_knee_study L_ankle_study)
        MarkerPair: markers=(L_mknee_study L_mankle_study)
        BodyScale tibia_l: axes=(X Y Z)
      Measurement femur_l: apply=true
        MarkerPair: markers=(LHJC_study L_knee_study)
        BodyScale femur_l: axes=(X Y Z)
        BodyScale patella_l: axes=(X Y Z)
      Measurement pelvisXY: apply=true
        MarkerPair: markers=(r.ASIS_study r.PSIS_study)
        MarkerPair: markers=(L.ASIS_study L.PSIS_study)
        BodyScale pelvis: axes=(X Y)
      Measurement pelvisZ: apply=true
        MarkerPair: markers=(RHJC_study LHJC_study)
        BodyScale pelvis: axes=Z
      Measurement torsoXY: apply=true
        MarkerPair: markers=(r_shoulder_study r.PSIS_study)
        MarkerPair: markers=(L_shoulder_study L.PSIS_study)
        MarkerPair: markers=(C7_study r.PSIS_study)
        MarkerPair: markers=(C7_study L.PSIS_study)
        BodyScale torso: axes=(X Y)
        BodyScale scapulaPhantom_r: axes=(X Y)
        BodyScale scapulaPhantom_l: axes=(X Y)
      Measurement torsoZ: apply=true
        MarkerPair: markers=(r_shoulder_study L_shoulder_study)
        BodyScale torso: axes=Z
        BodyScale scapulaPhantom_r: axes=Z
        BodyScale scapulaPhantom_l: axes=Z
      Measurement humerus: apply=true
        MarkerPair: markers=(r_shoulder_study r_lelbow_study)
        MarkerPair: markers=(r_shoulder_study r_melbow_study)
        MarkerPair: markers=(L_shoulder_study L_lelbow_study)
        MarkerPair: markers=(L_shoulder_study L_melbow_study)
        BodyScale humerus_r: axes=(X Y Z)
        BodyScale humerus_l: axes=(X Y Z)
      Measurement radius: apply=true
        MarkerPair: markers=(r_lwrist_study r_lelbow_study)
        MarkerPair: markers=(r_mwrist_study r_melbow_study)
        MarkerPair: markers=(L_lwrist_study L_lelbow_study)
        MarkerPair: markers=(L_mwrist_study L_melbow_study)
        BodyScale ulna_r: axes=(X Y Z)
        BodyScale radius_r: axes=(X Y Z)
        BodyScale hand_r: axes=(X Y Z)
        BodyScale ulna_l: axes=(X Y Z)
        BodyScale radius_l: axes=(X Y Z)
        BodyScale hand_l: axes=(X Y Z)
  MarkerPlacer:
    apply: true
    marker_file: /dataNAS/people/anoopai/OpenCap/opencap-core/Examples/Data/9a8302fa-da69-4037-8ff7-a272adde5208/MarkerData/PostAugmentation/ed5669af-8cda-4632-abcb-17bf130fabdf.trc
    time_range: 0.6666667 0.7666667
    output_motion_file: /dataNAS/people/anoopai/OpenCap/opencap-core/Examples/Data/9a8302fa-da69-4037-8ff7-a272adde5208/OpenSimData/Model/LaiUhlrich2022_NHE_scaled.mot
    output_model_file: /dataNAS/people/anoopai/OpenCap/opencap-core/Examples/Data/9a8302fa-da69-4037-8ff7-a272adde5208/OpenSimData/Model/LaiUhlrich2022_NHE_scaled.osim
    max_marker_movement: -1
    IKTaskSet:
      IKMarkerTask r.ASIS_study: apply=true weight=10
      IKMarkerTask L.ASIS_study: apply=true weight=10
      IKMarkerTask r.PSIS_study: apply=true weight=10
      IKMarkerTask L.PSIS_study: apply=true weight=10
      IKMarkerTask RHJC_study: apply=true weight=10
      IKMarkerTask LHJC_study: apply=true weight=10
      IKMarkerTask r_knee_study: apply=true weight=10
      IKMarkerTask r_mknee_study: apply=true weight=10
      IKMarkerTask r_ankle_study: apply=true weight=10
      IKMarkerTask r_mankle_study: apply=true weight=10
      IKMarkerTask r_toe_study: apply=true weight=10
      IKMarkerTask r_5meta_study: apply=true weight=10
      IKMarkerTask r_calc_study: apply=true weight=10
      IKMarkerTask L_knee_study: apply=true weight=10
      IKMarkerTask L_mknee_study: apply=true weight=10
      IKMarkerTask L_ankle_study: apply=true weight=10
      IKMarkerTask L_mankle_study: apply=true weight=10
      IKMarkerTask L_toe_study: apply=true weight=10
      IKMarkerTask L_calc_study: apply=true weight=10
      IKMarkerTask L_5meta_study: apply=true weight=10
      IKMarkerTask r_shoulder_study: apply=true weight=5
      IKMarkerTask L_shoulder_study: apply=true weight=5
      IKMarkerTask C7_study: apply=true weight=20
      IKMarkerTask r_lelbow_study: apply=true weight=1
      IKMarkerTask r_lwrist_study: apply=true weight=5
      IKMarkerTask r_mwrist_study: apply=true weight=5
      IKMarkerTask L_lelbow_study: apply=true weight=1
      IKMarkerTask L_lwrist_study: apply=true weight=5
      IKMarkerTask L_mwrist_study: apply=true weight=5
